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/batch
! ANSYS input file written by Workbench version 2022 R2
! File used for geometry attach: D:\Sneha\IIT\Assignments\Beam_Analysis_files\dp0\SYS\DM\SYS.agdb
/title,Beam_Analysis--Static Structural (A5)
/COM,/COM,     ANSYSMotion, 2022.2
/COM,/COM,     AqwaLoadMapping, 2022.2
/com,--- Data in consistent BIN units. See Solving Units in the help system for more information.
/units,BIN
/prep7
! Turn off shape checking because checks already performed inside WB mesher.
! See help system for more information.
SHPP,OFF,,NOWARN
etcon,set             ! allow ANSYS to choose best KEYOP's for 180x elements, resets any applicable keyopt to MAPDL defaults
/com,*********** Nodes for the whole assembly ***********
nblock,3,,6909
(1i9,3e20.9e3)
        1     8.571428571E-01     2.142857143E+00    -1.430063789E+00
        2     8.571428571E-01     2.142857143E+00    -6.800637891E-01
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-1
/com,*********** Nodes for all Remote Points ***********
nblock,3
(1i9,3e20.9e3)
     6282     0.000000000E+00    -3.000000037E+00    -6.800638072E-01
-1
/com,*********** Elements for Body 1 "Solid" ***********
et,1,186
keyo,1,2,1          ! set full integration on SOLID186
eblock,19,solid,,1176
(19i9)
        1        1        1        1        0        0        0        0       20        0        1        1     1709     1498     1483      984     1715     1497     1496
     1726     5901     5883     1725     4860     5899     5897     4859     1724     6267     5898     5882
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-1
/com,*********** Send User Defined Coordinate System(s) ***********
csys,0
toffst,459.67,  ! Temperature offset from absolute zero
/com,*********** Set Reference Temperature ***********
tref,71.6
/com,*********** Send Materials ***********
MP,EX,1,29007547.5428236,	! slinch s^-2 in^-1
MP,NUXY,1,0,

!************************* Model Summary ********************
!Solid,	Material1,	matid,	1
!************************* End Model Summary ********************
/com,******* Constant Zero Displacement Y *******
CMBLOCK,_DISPZEROUY,NODE,        9
(8i10)
      1328      1381      1382      1383      1384      5595      5691      5693
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cmsel,s,_DISPZEROUY
d,all,uy,0
nsel,all
/com,******* Constant Zero Displacement Z *******
CMBLOCK,_DISPZEROUZ,NODE,        9
(8i10)
      1328      1381      1382      1383      1384      5595      5691      5693
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cmsel,s,_DISPZEROUZ
d,all,uz,0
nsel,all
/com,*********** Create Remote Point "Internal Remote Point" ***********
! -------- Remote Point Used by "Remote Displacement" --------
*set,tid,3
*set,cid,2
et,cid,175
et,tid,170
keyo,tid,2,1               ! Don't fix the pilot node
keyo,tid,4,111111
keyo,cid,12,5              ! Bonded Contact
keyo,cid,4,1               ! Deformable RBE3 style load
keyo,cid,2,2               ! MPC style contact
! growing edge scoping into the face since scoped to a straight edge
mat,2
real,2
type,2
en,2158,1236
en,2159,1300
en,2160,1301
en,2161,1389
en,2162,1402
en,2163,1415
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en,2194,6276
*set,_npilot,6282
_npilot93=_npilot
type,tid
mat ,cid
real,cid
tshape,pilo
en,2195,_npilot
tshape
/com,*********** Define Force Using Surface Effect Elements ***********
local,12,0,0.,0.,0.,0.,0.,0.
csys,0
et,4,156
keyop,4,5,1         !  No orientation node
eblock,10,,,4
(15i9)
     2196        4        4        4       12     1502     1501     5905
     2197        4        4        4       12     1502     1503     5907
     2198        4        4        4       12     1503     1504     5909
     2199        4        4        4       12     1504     1299     5538
-1
esel,s,type,,4
keyop,4,2,1                ! Apply load in local coordinate system
keyop,4,7,1                ! Use original area so load is constant in large deformation
esel,all
/com,*********** Define Force Using Surface Effect Elements ***********
local,13,0,0.,0.,0.,0.,0.,0.
csys,0
et,5,156
keyop,5,5,1         !  No orientation node
eblock,10,,,4
(15i9)
     2200        5        5        5       13     1670     1669     6199
     2201        5        5        5       13     1670     1671     6201
     2202        5        5        5       13     1671     1672     6203
     2203        5        5        5       13     1672     1256     5453
-1
esel,s,type,,5
keyop,5,2,1                ! Apply load in local coordinate system
keyop,5,7,1                ! Use original area so load is constant in large deformation
esel,all
/com,*********** Construct Remote Displacement ***********

/COM,*** Create a component for all remote displacements ***
CMBLOCK,REMOTEDISPALL,NODE,        1
(8i10)
      6282

fini
/com,****************************************************************************
/com,*************************    SOLUTION       ********************************
/com,****************************************************************************
/solu
antype,0                   ! static analysis
_thickRatio=  1     ! Ratio of thick parts in the model
eqsl,pcg,1e-8,,,,,,1
cntr,print,1               ! print out contact info and also make no initial contact an error
dmpoption,emat,no             ! Don't combine emat file for DANSYS
dmpoption,esav,no             ! Don't combine esav file for DANSYS
nldiag,cont,iter           ! print out contact info each equilibrium iteration
rescontrol,,none                 ! Do not keep any restart files
/com,****************************************************
/com,******************* SOLVE FOR LS 1 OF 1 ****************
esel,s,type,,4
nsle
sfe,all,1,pres,1,0.
sfe,all,2,pres,1,-1999.99999966098
sfe,all,3,pres,1,0.
esel,s,type,,5
nsle
sfe,all,1,pres,1,0.
sfe,all,2,pres,1,-999.999999830492
sfe,all,3,pres,1,0.
nsel,all
esel,all
d,6282,ux,0.
d,6282,uy,0.
d,6282,uz,0.
d,6282,rotx,0.
d,6282,roty,0.
nsub,1,1,1
time,5.
outres,erase
outres,all,none
outres,nsol,all,
outres,rsol,all
outres,eangl,all
outres,etmp,all
outres,veng,all
outres,strs,all,
outres,epel,all,
outres,eppl,all,
outres,cont,all,
! *********** WB SOLVE COMMAND ***********
! check interactive state
*get,ANSINTER_,active,,int
*if,ANSINTER_,ne,0,then
/eof
*endif
solve
/com *************** Write FE CONNECTORS *********
CEWRITE,file,ce,,INTE
/com,****************************************************
/com,*************** FINISHED SOLVE FOR LS 1 *************
*get,_NSOLTHREADS,active,0,ntfs
*get,_NSOLPROCESSES,active,0,npfs
*get,_PCGITER,active,,solu,cgiter
/post1
fini
